K == (z2(s) + z1(s))/z1(s)
K := (300 + 100)/100 = 4
c_1 := 1/(2*π*120 kHz*10 nF) = 132.629 Ω
# Kaskade kobling med filteret
R := 10*10^3
c_1 := 132.629
C := 10*10^-9
1/(10 kΩ*10 nF) = 10 kHz
1/(ω*c)
1/(s*C)/(R + 1/(s*C)) == 1/(R*C)/(s + 1/(R*C))
50*2*π = 314.159
120000*2*π = 753982
T_1(s) := (R/(1 + s*R*C))
|T_1(1j*ω)| → 10000/|1 + ω*1i/10000|
T_1(|1j*ω|)
V_c(t) := 1.3*e^(-t/(R*C))  # Overshooter.
# Herved kan signalet klippes. | vender den rigtigt?
# [plot: 20*log(|T_1(1j*ω)|) vs ω]
1/(R*10*10^-9) = 10000
1.33 - 13333.0/(s + 10000.0)
T(s) := s/(s + 1/(R*c_1))*k
1/s*1.33 - 13333.0/(s + 10000.0)
120000*2*π = 753982
20*log(12) = 21.5836
clear(C, R)
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I_R == V_in/R
I_C == j*ω*C*V_in
