# Opstiller en overførings funktion for et højpasfilter, hvor α er knæk frekvensen.
# standard bodeplot (s + α)/s
# Overførings funktion for et høj-pas filter.
T(s) == R/(1/(s*C) + R) simplify → T(s) == C*R*s/(C*R*s + 1)
s/(s + 1/RC) == s/(s + α)
# f_c er cut off frekvensen
f_C == 1/(2*πRC)
# Sætter cut off til 1kHz når kondensatoren er på 10 nF, herved bliver
10000 == 1/(2*π*R*10*10^-9) solve, R → 5000/π = 1591.55
R == 1.6*kΩ
C == 10*nF
α := 1/(1.592*10^3*10*10^-9) = 62814.1
6.281*10^4*rad/s
# Zero crossing
7/(360 Ω) == 20*mA solve, x → =  # error: No solution was found.
1.2 V/(20 mA) = 60 Ω
(1.19*10^3) = 1190
18 V == R*20 mA solve, R → 9*V/(10*mA) = 900 Ω
12 V/(20 mA) = 600 Ω
6 V/(300 Ω) = 20 mA
1/(1.6 nF*10 kΩ) = 62.5 kHz
# RMS dc spænding
x/sqrt(2) == 18 solve, x → 18*sqrt(2) = 25.4558
(25.456 V - 1.65 V - 1.2 V)/(60 mA) = 376.767 Ω
0.05 kHz = 50 Hz
