R1 := V_c == V_b*(1 - e^(-t/(R*C))) solve, R → -t/(C*ln(1 - V_c/V_b))
V_c == V_b*(1 - e^(-t/(R*C)))
V_c/V_b == 1 - e^(-t/(R*C))
2.84 == 5*(1 - e^(-0.2/(R*0.0000022))) solve, R → 108311.539449
1 - V_c/V_b == e^(-t/(R*C))
ln*(1 - V_c/V_b) == ln(e^(-t/(R*C)))
ln*(1 - V_c/V_b) == -t/(R*C)
C := 2.2 μF
V_b := 5 V
t := 0.1 s
V_c := 2.93 V
R := -t/(ln(1 - V_c/V_b)*C) → 0.0515422345965*s/μF = 51.5422 kΩ
