P_ubelastet := 7.48 V*1.27 A = 9.4996 W
P_2 := 7.34 V*2.11 A = 15.4874 W
P_3 := 7.20 V*3.13 A = 22.536 W
P_4 := 7.04 V*4.20 A = 29.568 W
P_5 := 6.88 V*5.09 A = 35.0192 W
P_6 := 6.75 V*6.28 A = 42.39 W
P_7 := 6.57 V*7.12 A = 46.7784 W
P_8 := 6.47 V*8.35 A = 54.0245 W
# Nederenstående er til øvelse 1!
I_maks := 7.75 V/(0.21 Ω*2) = 18.4524 A
P_maks := I_maks^2*0.21 Ω = 71.503 W
